# OpenSim document version 20302
ControlSet:
  defaults: ControlLinear default: is_model_control=true extrapolate=true default_min=0.02 default_max=1
      filter_on=false use_steps=true kp=100 kv=20
  # Residual Controls
  ControlLinear [values shared by the 119 below unless stated]: is_model_control=true extrapolate=true default_max=1
      filter_on=false kp=100 kv=20 use_steps=true default_min=0.02
  ControlLinear FX.excitation: default_min=-1 use_steps=false
  ControlLinear FY.excitation: default_min=-1 use_steps=false
  ControlLinear FZ.excitation: default_min=-1 use_steps=false
  ControlLinear MX.excitation: default_min=-1 use_steps=false
  ControlLinear MY.excitation: default_min=-1 use_steps=false
  ControlLinear MZ.excitation: default_min=-1 use_steps=false
  # Reserve Controls - Right Leg
  ControlLinear hip_flexion_r_reserve.excitation: default_min=-1000 default_max=1000
  ControlLinear hip_adduction_r_reserve.excitation: default_min=-1000 default_max=1000
  ControlLinear hip_rotation_r_reserve.excitation: default_min=-1000 default_max=1000
  ControlLinear knee_angle_r_reserve.excitation: default_min=-1000 default_max=1000
  ControlLinear ankle_angle_r_reserve.excitation: default_min=-1000 default_max=1000
  ControlLinear subtalar_angle_r_reserve.excitation: default_min=-1000 default_max=1000
  ControlLinear mtp_angle_r_reserve.excitation: default_min=-1
  # Reserve Controls - Left Leg
  ControlLinear hip_flexion_l_reserve.excitation: default_min=-1000 default_max=1000
  ControlLinear hip_adduction_l_reserve.excitation: default_min=-1000 default_max=1000
  ControlLinear hip_rotation_l_reserve.excitation: default_min=-1000 default_max=1000
  ControlLinear knee_angle_l_reserve.excitation: default_min=-1000 default_max=1000
  ControlLinear ankle_angle_l_reserve.excitation: default_min=-1000 default_max=1000
  ControlLinear subtalar_angle_l_reserve.excitation: default_min=-1000 default_max=1000
  ControlLinear mtp_angle_l_reserve.excitation: default_min=-1
  # Reserve Controls - Back
  ControlLinear lumbar_extension_reserve.excitation: default_min=-1000 default_max=1000
  ControlLinear lumbar_bending_reserve.excitation: default_min=-1000 default_max=1000
  ControlLinear lumbar_rotation_reserve.excitation: default_min=-1000 default_max=1000
  # Muscles
  ControlLinear addbrev_r.excitation
  ControlLinear addlong_r.excitation
  ControlLinear addmagDist_r.excitation
  ControlLinear addmagIsch_r.excitation
  ControlLinear addmagMid_r.excitation
  ControlLinear addmagProx_r.excitation
  ControlLinear bflh_r.excitation
  ControlLinear bfsh_r.excitation
  ControlLinear edl_r.excitation
  ControlLinear ehl_r.excitation
  ControlLinear fdl_r.excitation
  ControlLinear fhl_r.excitation
  ControlLinear gaslat_r.excitation
  ControlLinear gasmed_r.excitation
  ControlLinear gem_r.excitation
  ControlLinear glmax1_r.excitation
  ControlLinear glmax2_r.excitation
  ControlLinear glmax3_r.excitation
  ControlLinear glmed1_r.excitation
  ControlLinear glmed2_r.excitation
  ControlLinear glmed3_r.excitation
  ControlLinear glmin1_r.excitation
  ControlLinear glmin2_r.excitation
  ControlLinear glmin3_r.excitation
  ControlLinear grac_r.excitation
  ControlLinear iliacus_r.excitation
  ControlLinear patlig_r.excitation
  ControlLinear pect_r.excitation
  ControlLinear perbrev_r.excitation
  ControlLinear perlong_r.excitation
  ControlLinear pertert_r.excitation
  ControlLinear piri_r.excitation
  ControlLinear psoas_r.excitation
  ControlLinear quadfem_r.excitation
  ControlLinear recfem_r.excitation
  ControlLinear sart_r.excitation
  ControlLinear semimem_r.excitation
  ControlLinear semiten_r.excitation
  ControlLinear soleus_r.excitation
  ControlLinear tfl_r.excitation
  ControlLinear tibant_r.excitation
  ControlLinear tibpost_r.excitation
  ControlLinear vasint_r.excitation
  ControlLinear vaslat_r.excitation
  ControlLinear vasmed_r.excitation
  ControlLinear addbrev_l.excitation
  ControlLinear addlong_l.excitation
  ControlLinear addmagDist_l.excitation
  ControlLinear addmagIsch_l.excitation
  ControlLinear addmagMid_l.excitation
  ControlLinear addmagProx_l.excitation
  ControlLinear bflh_l.excitation
  ControlLinear bfsh_l.excitation
  ControlLinear edl_l.excitation
  ControlLinear ehl_l.excitation
  ControlLinear fdl_l.excitation
  ControlLinear fhl_l.excitation
  ControlLinear gaslat_l.excitation
  ControlLinear gasmed_l.excitation
  ControlLinear gem_l.excitation
  ControlLinear glmax1_l.excitation
  ControlLinear glmax2_l.excitation
  ControlLinear glmax3_l.excitation
  ControlLinear glmed1_l.excitation
  ControlLinear glmed2_l.excitation
  ControlLinear glmed3_l.excitation
  ControlLinear glmin1_l.excitation
  ControlLinear glmin2_l.excitation
  ControlLinear glmin3_l.excitation
  ControlLinear grac_l.excitation
  ControlLinear iliacus_l.excitation
  ControlLinear patlig_l.excitation
  ControlLinear pect_l.excitation
  ControlLinear perbrev_l.excitation
  ControlLinear perlong_l.excitation
  ControlLinear pertert_l.excitation
  ControlLinear piri_l.excitation
  ControlLinear psoas_l.excitation
  ControlLinear quadfem_l.excitation
  ControlLinear recfem_l.excitation
  ControlLinear sart_l.excitation
  ControlLinear semimem_l.excitation
  ControlLinear semiten_l.excitation
  ControlLinear soleus_l.excitation
  ControlLinear tfl_l.excitation
  ControlLinear tibant_l.excitation
  ControlLinear tibpost_l.excitation
  ControlLinear vasint_l.excitation
  ControlLinear vaslat_l.excitation
  ControlLinear vasmed_l.excitation
  ControlLinear ercspn_r.excitation
  ControlLinear ercspn_l.excitation
  ControlLinear intobl_r.excitation
  ControlLinear intobl_l.excitation
  ControlLinear extobl_r.excitation
  ControlLinear extobl_l.excitation
