# OpenSim document version 20302
CMC_TaskSet:
  datafile: TrialName_EMG.sto
  # Pelvis-Ground
  CMC_Joint [values shared by the 23 below unless stated]: weight=(1 1 1) wrt_body=-1 express_body=-1
      active=(true false false) kp=(100 1 1) kv=(20 1 1) ka=(1 1 1) r0=(0 0 0) r1=(0 0 0) r2=(0 0 0) limit=0
  CMC_Joint pelvis_tz: coordinate=pelvis_tz
  CMC_Joint pelvis_tx: coordinate=pelvis_tx
  CMC_Joint pelvis_ty: coordinate=pelvis_ty
  CMC_Joint pelvis_tilt: coordinate=pelvis_tilt
  CMC_Joint pelvis_list: coordinate=pelvis_list
  CMC_Joint pelvis_rotation: coordinate=pelvis_rotation
  # Right Leg
  CMC_Joint hip_flexion_r: coordinate=hip_flexion_r
  CMC_Joint hip_adduction_r: coordinate=hip_adduction_r
  CMC_Joint hip_rotation_r: coordinate=hip_rotation_r
  CMC_Joint knee_angle_r: coordinate=knee_angle_r
  CMC_Joint ankle_angle_r: coordinate=ankle_angle_r
  CMC_Joint subtalar_angle_r: kp=(1600 1 1) kv=(80 1 1) coordinate=subtalar_angle_r
  CMC_Joint mtp_angle_r: coordinate=mtp_angle_r
  # Left Leg
  CMC_Joint hip_flexion_l: coordinate=hip_flexion_l
  CMC_Joint hip_adduction_l: coordinate=hip_adduction_l
  CMC_Joint hip_rotation_l: coordinate=hip_rotation_l
  CMC_Joint knee_angle_l: coordinate=knee_angle_l
  CMC_Joint ankle_angle_l: coordinate=ankle_angle_l
  CMC_Joint subtalar_angle_l: coordinate=subtalar_angle_l
  CMC_Joint mtp_angle_l: coordinate=mtp_angle_l
  # Back
  CMC_Joint lumbar_extension: coordinate=lumbar_extension
  CMC_Joint lumbar_bending: coordinate=lumbar_bending
  CMC_Joint lumbar_rotation: coordinate=lumbar_rotation
  # Muscles
  MuscleStateTrackingTask [values shared by the 24 below unless stated]: active=(true false false) weight=(0.5 0 0)
  MuscleStateTrackingTask bflh_r.activation
  MuscleStateTrackingTask bfsh_r.activation
  MuscleStateTrackingTask gaslat_r.activation
  MuscleStateTrackingTask gasmed_r.activation
  MuscleStateTrackingTask glmed1_r.activation
  MuscleStateTrackingTask glmed2_r.activation
  MuscleStateTrackingTask glmed3_r.activation
  MuscleStateTrackingTask recfem_r.activation
  MuscleStateTrackingTask semimem_r.activation
  MuscleStateTrackingTask semiten_r.activation
  MuscleStateTrackingTask vaslat_r.activation
  MuscleStateTrackingTask vasmed_r.activation
  MuscleStateTrackingTask bflh_l.activation
  MuscleStateTrackingTask bfsh_l.activation
  MuscleStateTrackingTask gaslat_l.activation
  MuscleStateTrackingTask gasmed_l.activation
  MuscleStateTrackingTask glmed1_l.activation
  MuscleStateTrackingTask glmed2_l.activation
  MuscleStateTrackingTask glmed3_l.activation
  MuscleStateTrackingTask recfem_l.activation
  MuscleStateTrackingTask semimem_l.activation
  MuscleStateTrackingTask semiten_l.activation
  MuscleStateTrackingTask vaslat_l.activation
  MuscleStateTrackingTask vasmed_l.activation
