# OpenSim document version 20302
CMCTool TrialName_CMC:
  model_file: subjectID__Simbody_Adjusted.osim
  replace_force_set: false
  force_set_files: Arnold2010_CMC_Actuators.xml
  results_directory: ./
  output_precision: 8
  initial_time: startTime
  final_time: endTime
  solve_for_equilibrium_for_auxiliary_states: true
  maximum_number_of_integrator_steps: 30000
  maximum_integrator_step_size: 0.0001
  minimum_integrator_step_size: 0.00000001
  integrator_error_tolerance: 0.00001
  external_loads_file: TrialName_GRF.xml
  desired_kinematics_file: TrialName_RRA_Kinematics_q.sto
  task_set_file: Arnold2010_CMC_Tasks.xml
  constraints_file: Arnold2010_CMC_ControlConstraints.xml
  lowpass_cutoff_frequency: -1
  cmc_time_window: 0.01
  use_fast_optimization_target: true
  optimizer_algorithm: ipopt
  numerical_derivative_step_size: 0.0001
  optimization_convergence_tolerance: 0.0001
  optimizer_max_iterations: 2000
  optimizer_print_level: 0
  use_verbose_printing: false
  AnalysisSet Analyses:
    Kinematics: start_time=-infinity end_time=infinity step_interval=10 in_degrees=true coordinates=all
    Actuation: start_time=-infinity end_time=infinity step_interval=10 in_degrees=true
