# OpenSim document version 20302
ScaleTool subjectID:
  mass: subjectMass
  height: subjectHeight
  age: 99
  notes: Subject Notes
  # Subject-Specific Information
  # Generic Model & Marker Set
  GenericModelMaker:
    model_file: Arnold2010_simbody.osim
    marker_set_file: Scale_MarkerSet.xml
  # Scaling Tool
  ModelScaler:
    apply: true
    scaling_order: measurements manualScale
    marker_file: TrialName.trc
    time_range: startTime endTime
    preserve_mass_distribution: true
    output_model_file: TempScaled.osim
    # Measurement-based Scaling
    MeasurementSet Measurement_Scale:
      # { Measurement Objects }
      # apply - flag to turn on and off scaling for the measurement
      # MarkerPairSet
      # objects
      # MarkerPair
      # markers - names of two markers, the distance between which is used to
      # compute a body scale factor
      # groups
      # BodyScaleSet - set of bodies to be scaled by the measurement
      # objects
      # BodyScale
      # axes - axes (X Y Z) along which to scale a body. For example, 'X Y Z'
      # scales along all three axes, and 'Y' scales just along the Y axis
      # groups
      # Torso
      Measurement torso: apply=true
        MarkerPair: markers=(V.SACRAL V.C7)
        MarkerPair: markers=(L.ASIS L.ACROMION)
        MarkerPair: markers=(R.ASIS R.ACROMION)
        BodyScale torso: axes=(X Y Z)
      # Pelvis
      Measurement pelvis: apply=true
        MarkerPair: markers=(R.ASIS L.ASIS)
        MarkerPair: markers=(V.SACRAL R.ASIS)
        MarkerPair: markers=(V.SACRAL L.ASIS)
        BodyScale pelvis: axes=(X Y Z)
      # Thigh
      Measurement thigh: apply=true
        MarkerPair: markers=(R.ASIS R.KNEE.LATERAL)
        MarkerPair: markers=(L.ASIS L.KNEE.LATERAL)
        BodyScale femur_r: axes=(X Y Z)
        BodyScale femur_l: axes=(X Y Z)
        BodyScale patella_r: axes=(X Y Z)
        BodyScale patella_l: axes=(X Y Z)
      # Shank
      Measurement shank: apply=true
        MarkerPair: markers=(R.KNEE.LATERAL R.ANKLE.LATERAL)
        MarkerPair: markers=(L.KNEE.LATERAL L.ANKLE.LATERAL)
        BodyScale tibia_r: axes=(X Y Z)
        BodyScale tibia_l: axes=(X Y Z)
        BodyScale talus_r: axes=(X Y Z)
        BodyScale talus_l: axes=(X Y Z)
      # Foot
      Measurement foot: apply=true
        MarkerPair: markers=(R.HEEL R.TOE)
        MarkerPair: markers=(L.HEEL L.TOE)
        BodyScale calcn_r: axes=(X Y Z)
        BodyScale calcn_l: axes=(X Y Z)
        BodyScale toes_r: axes=(X Y Z)
        BodyScale toes_l: axes=(X Y Z)
    # Manual Scaling
    ScaleSet Manual_Scale:
      # Removed [MJS]
    # Experimental Data (Static Pose)
    # Intermediate Output Specifications
  # Marker Placement on Scaled Model
  MarkerPlacer:
    apply: true
    marker_file: TrialName.trc
    time_range: startTime endTime
    output_model_file: subjectID__Simbody.osim
    max_marker_movement: -1
    # Inverse Kinematics Tasks
    IKTaskSet IK_Tasks:
      # { IKMarkerTask Object }
      # apply - whether or not this task will be used during the inverse kinematics solve
      # weight - weight given to a marker or coordinate for solving inverse kinematics
      IKMarkerTask R.ACROMION: apply=true weight=1000
      IKMarkerTask L.ACROMION: apply=true weight=1000
      IKMarkerTask V.C7: apply=true weight=1000
      IKMarkerTask R.ASIS: apply=true weight=1000
      IKMarkerTask L.ASIS: apply=true weight=1000
      IKMarkerTask V.SACRAL: apply=true weight=1000
      IKMarkerTask R.THIGH.INFERIOR: apply=true weight=1
      IKMarkerTask R.HIP.POSTERIOR: apply=true weight=1
      IKMarkerTask L.HIP.POSTERIOR: apply=true weight=1
      IKMarkerTask R.THIGH.ANTERIOR: apply=true weight=1
      IKMarkerTask R.THIGH.POSTERIOR: apply=true weight=1
      IKMarkerTask R.KNEE.LATERAL: apply=true weight=1000
      IKMarkerTask R.KNEE.MEDIAL: apply=true weight=1000
      IKMarkerTask R.SHANK.SUPERIOR: apply=true weight=1
      IKMarkerTask R.SHANK.ANTERIOR: apply=true weight=1
      IKMarkerTask R.SHANK.POSTERIOR: apply=true weight=1
      IKMarkerTask R.ANKLE.LATERAL: apply=true weight=1000
      IKMarkerTask R.ANKLE.MEDIAL: apply=true weight=1000
      IKMarkerTask R.HEEL: apply=true weight=1000
      IKMarkerTask R.TOE: apply=true weight=1000
      IKMarkerTask L.THIGH.SUPERIOR: apply=true weight=1
      IKMarkerTask L.THIGH.ANTERIOR: apply=true weight=1
      IKMarkerTask L.THIGH.POSTERIOR: apply=true weight=1
      IKMarkerTask L.KNEE.LATERAL: apply=true weight=1000
      IKMarkerTask L.KNEE.MEDIAL: apply=true weight=1000
      IKMarkerTask L.SHANK.INFERIOR: apply=true weight=1
      IKMarkerTask L.SHANK.ANTERIOR: apply=true weight=1
      IKMarkerTask L.SHANK.POSTERIOR: apply=true weight=1
      IKMarkerTask L.ANKLE.LATERAL: apply=true weight=1000
      IKMarkerTask L.ANKLE.MEDIAL: apply=true weight=1000
      IKMarkerTask L.HEEL: apply=true weight=1000
      IKMarkerTask L.TOE: apply=true weight=1000
      # { IKCoordinateTask Object }
      # apply - whether or not this task will be used during the inverse kinematics solve
      # weight - weight given to a marker or coordinate for solving inverse kinematics
      # value_type - Indicates the source of the coordinate value for this task. Possible
      # values are default_value (use default value of coordinate, as
      # specified in the model file, as the fixed target value), manual_value
      # (use the value specified in the value property of this task as the
      # fixed target value), or from_file (use the coordinate values from the
      # coordinate data specified by the coordinates_file property).
      # value - This value will be used as the desired (or prescribed) coordinate
      # value if value_type is set to manual_value.
      IKCoordinateTask [values shared by the 5 below unless stated]: apply=true weight=1000 value_type=default_value
          value=0
      IKCoordinateTask subtalar_angle_r
      IKCoordinateTask mtp_angle_r
      IKCoordinateTask subtalar_angle_l
      IKCoordinateTask mtp_angle_l
      IKCoordinateTask lumbar_extension: value_type=manual_value
    # Experimental Data
    # Output Specifications
