# OpenSim document version 20302
MarkerSet ModifiedClevelandClinicLowerLimb:
  # Marker
  # body - body segment in the model on which the marker resides
  # location - location of a marker on the body segment
  # fixed - flag (true or false) specifying whether or not a marker should be kept
  # fixed in the marker placement step (i.e. if false, the marker is
  # allowed to move)
  # VisibleObject
  # GeometrySet - set of geometry files and associated attributes (.vtp, .stl, .obj)
  # scale_factors - three scale factors for display purposes: scaleX scaleY scaleZ
  # transform -	transform relative to owner specified as 3 rotations (rad) followed
  # by 3 translations: rX rY rZ tX tY tZ
  # show_axes - whether to show a coordinate frame
  # display_preference - display preference: 0-hide, 1-wire, 3-flat, 4-shaded
  # Pelvis
  Marker R.ASIS: pelvis (0.02 0.03 0.128)
  Marker L.ASIS: pelvis (0.02 0.03 -0.128)
  Marker V.SACRAL: pelvis (-0.16 0.04 0)
  # Right Femur
  Marker R.THIGH.INFERIOR: femur_r (0.018 -0.2 0.064)
  Marker R.THIGH.ANTERIOR: femur_r (0.08 -0.25 0.0047)
  Marker R.THIGH.POSTERIOR: femur_r (0.01 -0.3 0.06)
  Marker R.KNEE.LATERAL: femur_r (0 -0.404 0.05)
  Marker R.KNEE.MEDIAL: femur_r (0 -0.404 -0.05)
  # Right Tibia
  Marker R.SHANK.SUPERIOR: tibia_r (0.005 -0.065 0.05)
  Marker R.SHANK.ANTERIOR: tibia_r (0.05 -0.08 0)
  Marker R.SHANK.POSTERIOR: tibia_r (0.02 -0.13 0.05)
  Marker R.ANKLE.LATERAL: tibia_r (-0.0250665 -0.3703546 0.04410386)
  Marker R.ANKLE.MEDIAL: tibia_r (-0.00299998 -0.3593772 -0.03807721)
    # Right Foot
  Marker R.HEEL: calcn_r (-0.02 0.02 0)
  Marker R.TOE: calcn_r (0.225 0.02 0.01)
  # Left Femur
  Marker L.THIGH.SUPERIOR: femur_l (0.018 -0.2 -0.064)
  Marker L.THIGH.ANTERIOR: femur_l (0.08 -0.25 -0.0047)
  Marker L.THIGH.POSTERIOR: femur_l (0.01 -0.3 -0.06)
  Marker L.KNEE.LATERAL: femur_l (0 -0.404 -0.05)
  Marker L.KNEE.MEDIAL: femur_l (0 -0.404 0.05)
  # Left Tibia
  Marker L.SHANK.INFERIOR: tibia_l (0.005 -0.065 -0.05)
  Marker L.SHANK.ANTERIOR: tibia_l (0.05 -0.08 0)
  Marker L.SHANK.POSTERIOR: tibia_l (-0.02 -0.13 -0.05)
  Marker L.ANKLE.LATERAL: tibia_l (-0.0250665 -0.3703546 -0.04410386)
  Marker L.ANKLE.MEDIAL: tibia_l (-0.00299998 -0.3593772 0.03807721)
  # Left Foot
  Marker L.HEEL: calcn_l (-0.02 0.02 0)
  Marker L.TOE: calcn_l (0.225 0.02 -0.01)
