# OpenSim document version 20302
ForwardTool TrialName_Forward:
  model_file: subjectID__Simbody_Adjusted.osim
  replace_force_set: false
  force_set_files: Arnold2010_CMC_Actuators.xml
  results_directory: ./
  output_precision: 20
  initial_time: startTime
  final_time: endTime
  solve_for_equilibrium_for_auxiliary_states: false
  maximum_number_of_integrator_steps: 30000
  maximum_integrator_step_size: 1
  minimum_integrator_step_size: 0.000001
  integrator_error_tolerance: 0.00005
  external_loads_file: TrialName_GRF.xml
  states_file: TrialName_CMC_states.sto
  use_specified_dt: false
  AnalysisSet Analyses:
    Kinematics: start_time=startTime end_time=endTime step_interval=10 in_degrees=true coordinates=all
    Actuation: start_time=startTime end_time=endTime step_interval=10 in_degrees=true
    BodyKinematics: start_time=startTime end_time=endTime step_interval=10 in_degrees=true bodies=all
        express_results_in_body_local_frame=false
    MuscleAnalysis: start_time=startTime end_time=endTime step_interval=10 in_degrees=true muscle_list=all
        moment_arm_coordinate_list=all compute_moments=true
      # false
      # -infinity
      # infinity
      # med_gas_r lat_gas_r soleus_r
      # hip_flexion_r knee_angle_r ankle_angle_r
      # false
  ControllerSet Controllers:
    ControlSetController: controls_file=TrialName_CMC_controls.xml
    CorrectionController: kp=16 kv=8
