# OpenSim document version 20302
IKTool TrialName_IK:
  results_directory: ./
  model_file: subjectID__Simbody.osim
  constraint_weight: 20
  accuracy: 0.00001
  marker_file: TrialName.trc
  time_range: startTime endTime
  report_errors: true
  output_motion_file: TrialName_IK.mot
  # Input & Solver Specifications
  # Inverse Kinematics Tasks
  IKTaskSet IK_Tasks:
    # { IKMarkerTask Object }
    # apply - whether or not this task will be used during the inverse kinematics solve
    # weight - weight given to a marker or coordinate for solving inverse kinematics
    IKMarkerTask R.ACROMION: apply=true weight=10
    IKMarkerTask L.ACROMION: apply=true weight=10
    IKMarkerTask V.C7: apply=true weight=10
    IKMarkerTask R.ASIS: apply=true weight=10
    IKMarkerTask L.ASIS: apply=true weight=10
    IKMarkerTask V.SACRAL: apply=true weight=10
    IKMarkerTask R.HIP.POSTERIOR: apply=true weight=1
    IKMarkerTask L.HIP.POSTERIOR: apply=true weight=1
    IKMarkerTask R.THIGH.INFERIOR: apply=true weight=1
    IKMarkerTask R.THIGH.ANTERIOR: apply=true weight=1
    IKMarkerTask R.THIGH.POSTERIOR: apply=true weight=1
    IKMarkerTask R.KNEE.LATERAL: apply=true weight=10
    IKMarkerTask R.KNEE.MEDIAL: apply=false weight=0
    IKMarkerTask R.SHANK.SUPERIOR: apply=true weight=1
    IKMarkerTask R.SHANK.ANTERIOR: apply=true weight=1
    IKMarkerTask R.SHANK.POSTERIOR: apply=true weight=1
    IKMarkerTask R.ANKLE.LATERAL: apply=true weight=10
    IKMarkerTask R.ANKLE.MEDIAL: apply=false weight=0
    IKMarkerTask R.HEEL: apply=true weight=10
    IKMarkerTask R.TOE: apply=true weight=10
    IKMarkerTask L.THIGH.SUPERIOR: apply=true weight=1
    IKMarkerTask L.THIGH.ANTERIOR: apply=true weight=1
    IKMarkerTask L.THIGH.POSTERIOR: apply=true weight=1
    IKMarkerTask L.KNEE.LATERAL: apply=true weight=10
    IKMarkerTask L.KNEE.MEDIAL: apply=false weight=0
    IKMarkerTask L.SHANK.INFERIOR: apply=true weight=1
    IKMarkerTask L.SHANK.ANTERIOR: apply=true weight=1
    IKMarkerTask L.SHANK.POSTERIOR: apply=true weight=1
    IKMarkerTask L.ANKLE.LATERAL: apply=true weight=10
    IKMarkerTask L.ANKLE.MEDIAL: apply=false weight=0
    IKMarkerTask L.HEEL: apply=true weight=10
    IKMarkerTask L.TOE: apply=true weight=10
    # { IKCoordinateTask Object }
    # apply - whether or not this task will be used during the inverse kinematics solve
    # weight - weight given to a marker or coordinate for solving inverse kinematics
    # value_type - Indicates the source of the coordinate value for this task. Possible
    # values are default_value (use default value of coordinate, as
    # specified in the model file, as the fixed target value), manual_value
    # (use the value specified in the value property of this task as the
    # fixed target value), or from_file (use the coordinate values from the
    # coordinate data specified by the coordinates_file property).
    # value - This value will be used as the desired (or prescribed) coordinate
    # value if value_type is set to manual_value.
    IKCoordinateTask subtalar_angle_r: apply=true weight=1000 value_type=default_value value=0
    IKCoordinateTask mtp_angle_r: apply=true weight=1000 value_type=default_value value=0
    IKCoordinateTask subtalar_angle_l: apply=true weight=1000 value_type=default_value value=0
    IKCoordinateTask mtp_angle_l: apply=true weight=1000 value_type=default_value value=0
  # Output Specifications
