# OpenSim document version 20302
# </IKTool>
InverseKinematicsTool TrialName_IK:
  results_directory: ./
  model_file: subjectID__Simbody.osim
  constraint_weight: 20
  accuracy: 0.00001
  marker_file: TrialName.trc
  time_range: startTime endTime
  report_errors: true
  output_motion_file: TrialName_IK.mot
  report_marker_locations: false
  # Input & Solver Specifications
  # Inverse Kinematics Tasks
  IKTaskSet IK_Tasks:
    IKMarkerTask R.ACROMION: apply=true weight=10
    IKMarkerTask L.ACROMION: apply=true weight=10
    IKMarkerTask V.C7: apply=true weight=10
    IKMarkerTask R.ASIS: apply=true weight=10
    IKMarkerTask L.ASIS: apply=true weight=10
    IKMarkerTask V.SACRAL: apply=true weight=10
    IKMarkerTask R.HIP.POSTERIOR: apply=true weight=1
    IKMarkerTask L.HIP.POSTERIOR: apply=true weight=1
    IKMarkerTask R.THIGH.INFERIOR: apply=true weight=1
    IKMarkerTask R.THIGH.ANTERIOR: apply=true weight=1
    IKMarkerTask R.THIGH.POSTERIOR: apply=true weight=1
    IKMarkerTask R.KNEE.LATERAL: apply=true weight=10
    IKMarkerTask R.KNEE.MEDIAL: apply=false weight=0
    IKMarkerTask R.SHANK.SUPERIOR: apply=true weight=1
    IKMarkerTask R.SHANK.ANTERIOR: apply=true weight=1
    IKMarkerTask R.SHANK.POSTERIOR: apply=true weight=1
    IKMarkerTask R.ANKLE.LATERAL: apply=true weight=10
    IKMarkerTask R.ANKLE.MEDIAL: apply=false weight=0
    IKMarkerTask R.HEEL: apply=true weight=10
    IKMarkerTask R.TOE: apply=true weight=10
    IKMarkerTask L.THIGH.SUPERIOR: apply=true weight=1
    IKMarkerTask L.THIGH.ANTERIOR: apply=true weight=1
    IKMarkerTask L.THIGH.POSTERIOR: apply=true weight=1
    IKMarkerTask L.KNEE.LATERAL: apply=true weight=10
    IKMarkerTask L.KNEE.MEDIAL: apply=false weight=0
    IKMarkerTask L.SHANK.INFERIOR: apply=true weight=1
    IKMarkerTask L.SHANK.ANTERIOR: apply=true weight=1
    IKMarkerTask L.SHANK.POSTERIOR: apply=true weight=1
    IKMarkerTask L.ANKLE.LATERAL: apply=true weight=10
    IKMarkerTask L.ANKLE.MEDIAL: apply=false weight=0
    IKMarkerTask L.HEEL: apply=true weight=10
    IKMarkerTask L.TOE: apply=true weight=10
    IKCoordinateTask subtalar_angle_r: apply=true weight=1000 value_type=default_value value=0
    IKCoordinateTask mtp_angle_r: apply=true weight=1000 value_type=default_value value=0
    IKCoordinateTask subtalar_angle_l: apply=true weight=1000 value_type=default_value value=0
    IKCoordinateTask mtp_angle_l: apply=true weight=1000 value_type=default_value value=0
  # Output Specifications
