# OpenSim document version 20302
CMC_TaskSet:
  datafile: TrialName_EMG.sto
  # Pelvis-Ground
  CMC_Joint [values shared by the 23 below unless stated]: weight=(1 1 1) wrt_body=-1 express_body=-1
      active=(true false false) kp=(100 1 1) kv=(20 1 1) ka=(1 1 1) r0=(0 0 0) r1=(0 0 0) r2=(0 0 0) limit=0
  CMC_Joint pelvis_tz: coordinate=pelvis_tz
  CMC_Joint pelvis_tx: coordinate=pelvis_tx
  CMC_Joint pelvis_ty: coordinate=pelvis_ty
  CMC_Joint pelvis_tilt: coordinate=pelvis_tilt
  CMC_Joint pelvis_list: coordinate=pelvis_list
  CMC_Joint pelvis_rotation: coordinate=pelvis_rotation
  # Right Leg
  CMC_Joint hip_flexion_r: coordinate=hip_flexion_r
  CMC_Joint hip_adduction_r: coordinate=hip_adduction_r
  CMC_Joint hip_rotation_r: coordinate=hip_rotation_r
  CMC_Joint knee_angle_r: coordinate=knee_angle_r
  CMC_Joint ankle_angle_r: coordinate=ankle_angle_r
  CMC_Joint subtalar_angle_r: kp=(1600 1 1) kv=(80 1 1) coordinate=subtalar_angle_r
  CMC_Joint mtp_angle_r: coordinate=mtp_angle_r
  # Left Leg
  CMC_Joint hip_flexion_l: coordinate=hip_flexion_l
  CMC_Joint hip_adduction_l: coordinate=hip_adduction_l
  CMC_Joint hip_rotation_l: coordinate=hip_rotation_l
  CMC_Joint knee_angle_l: coordinate=knee_angle_l
  CMC_Joint ankle_angle_l: coordinate=ankle_angle_l
  CMC_Joint subtalar_angle_l: coordinate=subtalar_angle_l
  CMC_Joint mtp_angle_l: coordinate=mtp_angle_l
  # Back
  CMC_Joint lumbar_extension: coordinate=lumbar_extension
  CMC_Joint lumbar_bending: coordinate=lumbar_bending
  CMC_Joint lumbar_rotation: coordinate=lumbar_rotation
  # Muscles
  MuscleStateTrackingTask [values shared by the 24 below unless stated]: active=(true false false) weight=(0.5 0 0)
  MuscleStateTrackingTask glut_med1_r.activation
  MuscleStateTrackingTask glut_med2_r.activation
  MuscleStateTrackingTask glut_med3_r.activation
  MuscleStateTrackingTask semimem_r.activation
  MuscleStateTrackingTask semiten_r.activation
  MuscleStateTrackingTask bifemlh_r.activation
  MuscleStateTrackingTask bifemsh_r.activation
  MuscleStateTrackingTask rect_fem_r.activation
  MuscleStateTrackingTask vas_med_r.activation
  MuscleStateTrackingTask vas_lat_r.activation
  MuscleStateTrackingTask med_gas_r.activation
  MuscleStateTrackingTask lat_gas_r.activation
  MuscleStateTrackingTask glut_med1_l.activation
  MuscleStateTrackingTask glut_med2_l.activation
  MuscleStateTrackingTask glut_med3_l.activation
  MuscleStateTrackingTask semimem_l.activation
  MuscleStateTrackingTask semiten_l.activation
  MuscleStateTrackingTask bifemlh_l.activation
  MuscleStateTrackingTask bifemsh_l.activation
  MuscleStateTrackingTask rect_fem_l.activation
  MuscleStateTrackingTask vas_med_l.activation
  MuscleStateTrackingTask vas_lat_l.activation
  MuscleStateTrackingTask med_gas_l.activation
  MuscleStateTrackingTask lat_gas_l.activation
